x1 := 1
x4 := 1
x2 := 1
x5 := 1
x3 := 1
x6 := 1
Func(x1, x2, x3, x4, x5, x6) := 2*x1 + 3*x2 - x4
Given
2*x1 - x2 - 2*x4 + x5 == 16
3*x1 + 2*x2 + x3 - 3*x4 == 18
-x1 + 3*x2 + 4*x4 + x6 == 24
x1 ≥ 0
x2 ≥ 0
x3 ≥ 0
x4 ≥ 0
x5 ≥ 0
x6 ≥ 0
6/11 = 0.545455
90/11 = 8.18182
[X1; X2; X3; X4; X5; X6] := Maximize(Func, x1, x2, x3, x4, x5, x6) = [0.545455; 8.18182; 0; 0; 23.0909; 0]
254/11 = 23.0909
282/11 = 25.6364
Func(X1, X2, X3, X4, X5, X6) = 25.6364
