# Проверка на закрытость задачи
wastes := [15, 1, 22, 19, 1; 21, 18, 11, 4, 3; 26, 29, 23, 26, 24; 21, 10, 3, 19, 27]
stocks := [20; 20; 20; 20]
sum(stocks) = 80
# Задача закрытая
needs := transpose([19, 19, 19, 19, 4])
sum(needs) = 80
# Целевая функция
f(a) := sum(sum(wastes[i, j]*a[i, j], j = 0 .. 4), i = 0 .. 3)
# Опорный план
x := [19, 1, 0, 0, 0; 0, 18, 2, 0, 0; 0, 0, 17, 3, 0; 0, 0, 0, 16, 4]
stocks = [20; 20; 20; 20]
transpose(needs) = [19, 19, 19, 19, 4]
Ограничения
Given
x ≥ 0
sum(x[2, j], j = 0 .. 4) == stocks[2]
sum(x[3, j], j = 0 .. 4) == stocks[3]
sum(x[0, j], j = 0 .. 4) == stocks[0]
sum(x[1, j], j = 0 .. 4) == stocks[1]
sum(x[i, 2], i = 0 .. 3) == needs[2]
sum(x[i, 3], i = 0 .. 3) == needs[3]
sum(x[i, 4], i = 0 .. 3) == needs[4]
sum(x[i, 0], i = 0 .. 3) == needs[0]
sum(x[i, 1], i = 0 .. 3) == needs[1]
v := Minimize(f, x)
# Оптимальный план
v = [0, 18, 0, 0, 2; 0, 0, 0, 19, 1; 19, 0, 0, 0, 1; 0, 1, 19, 0, 0]
# Цена перевозок
f(x) = 1513
f(v) = 684
